// COMSOL Multiphysics 6.0.0.318 model "Viscous Damper with Eddy current damping Comsol.mph"
// Outline of the model tree

Parameters
  Dr = 2.83e-2[m]  // Rod diameter
  Dp = 8.37e-2[m]  // Piston diameter
  Lp = 0.0254[m]  // Piston half-length
  Dd = 0.1128[m]  // Damper outer diameter
  Hw = 1.37e-2[m]  // Damper wall thickness
  Ld = U0+Lp  // Damper seal position
  U0 = 0.1524[m]  // Damper chamber height
  T0 = 300[K]  // Initial temperature
  hwall = 5[W/(m^2*K)]  // Heat transfer coefficient
  a0 = U0-Lp  // Piston displacement amplitude
  f = 0.4[Hz]  // Frequency
  ncycle = 16  // Number of loading cycles
  tmax = ncycle/f  // Total loading time
  tstep = 0.1/f  // Sampling time interval
  dm = 7.4[g/(cm)^3]  // Density of magnet

Variables
  var1 "fluid_damper_variables"
    zlin1 = x*(1+(Lp+Z)/(Ld-Lp))  // Mesh deformation below piston
    zlin2 = x*(Ld-Z)/(Ld-Lp)  // Mesh deformation above piston
  var2 "magnet mass and gravitational force"
    m = intmag(2*pi*r*dm)
    Fg = m*g_const
  var3 "Lorentz force and acceleration of magnet"
    Fz = inttube(-mf.FLtzz*2*pi*r)
    a = (Fg-Fz)/m

Selections
  sel1: Explicit "Sillicone Oil Domain" on domains 4, 6-9
  sel2: Explicit "Temperature boundary" on boundaries 2, 7, 9, 14, 16, 21, 23, 28
  sel3: Explicit "Heat Flux boundary" on no boundaries
  sel4: Explicit "Pressure point" on points 12
  sel5: Explicit "Wall Boundary" on boundaries 22, 24, 26
  sel6: Explicit "Moving Mesh" on domains 2, 5, 8, 11
  sel7: Explicit "oil moving mesh (below)" on domains 1, 4, 7, 10
  sel8: Explicit "oil moving mesh (above)" on domains 3, 6, 9, 12
  sel9: Explicit "Distribution 1" on boundaries 23, 25, 27, 28
  sel10: Explicit "Distribution 2" on boundaries 1, 5, 8, 12, 15, 19, 22, 26
  sel11: Explicit "Distribution 3" on boundaries 9, 11, 13, 14
  sel12: Explicit "Distribution 4" on boundaries 16, 18, 20, 21
  sel13: Explicit "Distribution 5" on boundaries 3, 10, 17, 24
  sel14: Explicit "Distribution 6" on boundaries 2, 4, 6, 7
  sel15: Explicit "Copper Tube" on domains 10-12
  sel16: Explicit "Magnet" on domains 1-3, 5
  sel17: Explicit "Perfect Magnet conductor" on boundaries 2, 7, 9, 14, 23, 28, 30, 33, 35-37
  sel18: Explicit "Air" on domains 13, 14
  sel19: Explicit "magnet" on domains 2, 5
  sel20: Explicit "rod" on domains 1, 3

Couplings
  intop1: Integration "Integration over Magnet" on selection sel19 | opname = intmag
  intop2: Integration "Integration over Tube" on selection sel15 | opname = inttube

Probes
  pdom1: DomainPoint "Domain Point Probe 1" | bndsnap2 = on; coords = {Dd/2-Hw, 0.5*U0}
    ppb1: PointExpr "Point Probe Expression 1"
      probename = temppr
      expr = T
      unit = degF
      descr = Temperature
      table = tbl1

Coordinate systems
  ie1: InfiniteElement "Infinite Element Domain 1" on domains 14 | ScalingType = Cylindrical

Common definitions
  pres1: PrescribedDeformation on selection sel6 | prescribedDeformation = {0, 0, x}
  pres2: PrescribedDeformation on selection sel7 | prescribedDeformation = {0, 0, zlin1}
  pres3: PrescribedDeformation on selection sel8 | prescribedDeformation = {0, 0, zlin2}

Geometry
  geom1 "Geometry 1" (2D axisymmetric, length unit m)
    r1: Rectangle "Piston rod" | pos = {0, -Ld}; size = {Dr/2, 2*Ld}
    r2: Rectangle "Area Inside Cylinder" | pos = {0, -Ld}; size = {Dp/2, 2*Ld}
    r3: Rectangle "Orifice" | pos = {0, -Ld}; size = {Dd/2-Hw, 2*Ld}
    r4: Rectangle "Damper Cylinder" | pos = {0, -Ld}; size = {Dd/2, 2*Ld}
    r5: Rectangle "Piston" | pos = {0, -Lp}; size = {Dd/2, 2*Lp}
    r6: Rectangle
      pos = {0, -Ld}
      layername = Layer 1
      layer = 0.06
      layerright = on
      layerbottom = off
      size = {0.2, 2*Ld}
    fin: Finalize "Viscous Damper Assembly"

Materials
  mat2: Common "Sillicone oil" on selection sel1
    def "Basic"
      nu_25C = 0.0125[m^2/s]
      VTC = 0.6[1]
      thermalconductivity = 22.5
      density = 950
      heatcapacity = 2e3
      dynamicviscosity = nu_25C*rho*(1-VTC*(T-311[K])/(61[K]))/(1+VTC*0.2107)
      electricconductivity = 0.000154
      relpermittivity = 2.6
      relpermeability = 3
  mat3: Common "Copper" on selection sel15
    def "Basic"
      relpermeability = 1
      electricconductivity = 5.998e7[S/m]
      thermalexpansioncoefficient = 17e-6[1/K]
      heatcapacity = 385[J/(kg*K)]
      relpermittivity = 1
      density = 8960[kg/m^3]
      thermalconductivity = 400[W/(m*K)]
    Enu "Young's modulus and Poisson's ratio"
      E = 110e9[Pa]
      nu = 0.35
    linzRes "Linearized resistivity"
      rho0 = 1.72e-8[ohm*m]
      alpha = 0.0039[1/K]
      Tref = 298[K]
  mat4: Common "N50 (Sintered NdFeB)" on selection sel16
    def "Basic"
      electricconductivity = 1/1.4[uohm*m]
      relpermittivity = 1
      thermalconductivity = 6.1639
      density = 7600
      heatcapacity = 460.548
    RemanentFluxDensity
      murec = 1.05
      normBr = 1.41[T]
    linzRes "Linearized resistivity"
      rho0 = 1.5e-6
      alpha = 0.0001
      Tref = 298
  mat5: Common "Air" on selection sel18
    def "Basic"
      thermalexpansioncoefficient = alpha_p(pA,T)
      molarmass = 0.02897[kg/mol]
      bulkviscosity = muB(T)
      relpermeability = 1
      relpermittivity = 1
      dynamicviscosity = eta(T)
      ratioofspecificheat = 1.4
      electricconductivity = 0[S/m]
      heatcapacity = Cp(T)
      density = rho(pA,T)
      thermalconductivity = k(T)
      soundspeed = cs(T)
      eta: Piecewise | arg = T; pieces = {200.0, 1600.0, -8.38278E-7+8.35717342E-8*T^1-7.69429583E-11*T^2+4.6437266E-14*T^3-1.06585607E-17*T^4}; argunit = K; fununit = Pa*s
      Cp: Piecewise | arg = T; pieces = {200.0, 1600.0, 1047.63657-0.372589265*T^1+9.45304214E-4*T^2-6.02409443E-7*T^3+1.2858961E-10*T^4}; argunit = K; fununit = J/(kg*K)
      rho: Analytic | expr = pA*0.02897/R_const[K*mol/J]/T; args = {pA, T}; fununit = kg/m^3; argunit = {Pa, K}
      k: Piecewise | arg = T; pieces = {200.0, 1600.0, -0.00227583562+1.15480022E-4*T^1-7.90252856E-8*T^2+4.11702505E-11*T^3-7.43864331E-15*T^4}; argunit = K; fununit = W/(m*K)
      cs: Analytic | expr = sqrt(1.4*R_const[K*mol/J]/0.02897*T); args = T; fununit = m/s; argunit = K
      an1: Analytic | funcname = alpha_p; expr = -1/rho(pA,T)*d(rho(pA,T),T); args = {pA, T}; fununit = 1/K; argunit = {Pa, K}
      an2: Analytic "Analytic 2a" | funcname = muB; expr = 0.6*eta(T); args = T; fununit = Pa*s; argunit = K
    RefractiveIndex
      n = 1
      ki = 0
    NonlinearModel
      BA = (def.gamma+1)/2
    idealGas
      Rs = R_const/Mn
      heatcapacity = Cp(T)
      ratioofspecificheat = 1.4
      molarmass = 0.02897
      Cp: Piecewise | arg = T; pieces = {200.0, 1600.0, 1047.63657-0.372589265*T^1+9.45304214E-4*T^2-6.02409443E-7*T^3+1.2858961E-10*T^4}; argunit = K; fununit = J/(kg*K)
  mat6: Common "Steel AISI 4340" on selection sel20
    def "Basic"
      relpermeability = 1
      electricconductivity = 4.032e6[S/m]
      thermalexpansioncoefficient = 12.3e-6[1/K]
      heatcapacity = 475[J/(kg*K)]
      relpermittivity = 1
      density = 7850[kg/m^3]
      thermalconductivity = 44.5[W/(m*K)]
    Enu "Young's modulus and Poisson's ratio"
      E = 205e9[Pa]
      nu = 0.28

Physics
  spf: LaminarFlow on selection sel1
    dependent variable u = {u, v, w}
    PhysicalModelProperty.Compressibility = Incompressible
    AdvancedSettingProperty.UsePseudoTime = 1
    fp1: FluidProperties (default)
    init1: init "Initial Values 1" (default)
    axi1: AxialSymmetry (default)
    wallbc1: WallBC "Wall 1" (default)
    prpc1: PressurePointConstraint on selection sel4
    wallbc2: WallBC "Wall 2" on selection sel5 | TranslationalVelocityOption = Manual
  mf: InductionCurrents "Magnetic Fields" on all domains
    dependent variable A = {Ar, Aphi, Az}
    al1: AmperesLaw "Ampère's Law 1" (default)
    axi1: AxialSymmetry (default)
    mi1: MagneticInsulation (default)
    init1: init "Initial Values 1" (default)
    al2: AmperesLaw "Ampère's Law - Magnet" on selection sel19
      ConstitutiveRelationBH = RemanentFluxDensity
      e_crel_BH_RemanentFluxDensity = {0, 0, 1}
      ConstitutiveRelationJcE = LinearizedResistivity
    vlt1: Velocity "Velocity (Lorentz Term) 1" on selection sel15 | v = {0, 0, xt}
    pmc1: PerfectMagneticConductor on selection sel17
  ge: GlobalEquations "Global ODEs and DAEs"
    ge2: GlobalEquations
      name = comp1.x
      equation = d(xt,t)-(Fg-Fz)/m
      valueType = complex
      DependentVariableQuantity = displacement
      CustomDependentVariableUnit = m
      SourceTermQuantity = acceleration
      CustomSourceTermUnit = m
  ht: HeatTransferInSolidsAndFluids on all domains
    dependent variable T
    ShapeProperty.order_temperature = 1
    solid1: SolidHeatTransferModel "Solid 1" (default)
    fluid1: FluidHeatTransferModel "Fluid 1" on selection sel1
      gamma_not_IG_mat = userdef
      gamma_not_IG = 1
      fluidType = gasLiquid
    init1: init "Initial Values 1" (default) | Tinit = T0
    axi1: AxialSymmetry (default)
    ins1: ThermalInsulation (default)
    temp1: TemperatureBoundary "Temperature 1" on selection sel2 | T0 = T0
    hf1: HeatFluxBoundary "Heat Flux 1" on boundaries 2, 7, 9, 14, 23, 28, 30, 33, 35-37
      HeatFluxType = ConvectiveHeatFlux
      h = hwall
      Text = T0

Multiphysics
  nitf1: NonIsothermalFlow on all domains | Fluid_physics = spf; Heat_physics = ht

Mesh
  mesh1 "Mesh 1"
    size: MeshSizeDefault | hmax = 0.0238; hmin = 1.07E-4; hcurve = 0.3; hgrad = 1.3
    map1: Map "Mapped 1" on remaining entities
      dis1: Distribution on selection sel9
        type = predefined
        reverse = on
        elemcount = 4
        elemratio = 4
        growthrate = exponential
      dis2: Distribution on selection sel10
        type = predefined
        elemcount = 32
        elemratio = 8
        growthrate = exponential
        symmetric = on
      dis3: Distribution on selection sel11
        type = predefined
        elemcount = 30
        elemratio = 10
        growthrate = exponential
        symmetric = on
      dis4: Distribution on selection sel12 | numelem = 8
      dis5: Distribution on boundaries 3, 10, 17, 24, 31 | numelem = 32
      dis6: Distribution on selection sel14
      dis7: Distribution on boundaries 30, 33, 35, 36
        type = predefined
        elemcount = 8
        elemratio = 12
        growthrate = exponential
        symmetric = on
      dis8: Distribution on boundaries 29, 32
        type = predefined
        elemcount = 32
        elemratio = 8
        growthrate = exponential
        symmetric = on

Studies
  std1 "Study 1"
    stat: Stationary | solve for = {mf}
    time: Transient "Time Dependent" | tlist = range(0,0.005,0.25); usertol = on; rtol = 0.005

Solver configurations
  sol1 "Solution 1" (study std1)
    v1: Variables "Dependent Variables 1"
    s1: Stationary "Stationary Solver 1"
      dDef: Direct
      fc1: FullyCoupled | linsolver = dDef
    su1: StoreSolution "Solution Store 1"
    v2: Variables "Dependent Variables 2" | initmethod = sol; notsolmethod = sol
    t1: Time "Time-Dependent Solver 1"
      tlist = range(0,0.005,0.25)
      tout = tstepsclosest
      rtol = 0.005
      atolglobalfactor = 0.05
      atolmethod = {comp1_A, global, comp1_p, scaled, comp1_T, global, comp1_u, global, comp1_ODE1, global}
      atolvaluemethod = {comp1_A, factor, comp1_p, factor, comp1_T, factor, comp1_u, factor, comp1_ODE1, factor}
      atolfactor = {comp1_A, 0.1, comp1_p, 1, comp1_T, 0.1, comp1_u, 0.1, comp1_ODE1, 0.1}
      atol = {comp1_A, 1e-3, comp1_p, 1e-3, comp1_T, 1e-3, comp1_u, 1e-3, comp1_ODE1, 1e-3}
      tstepsbdf = strict
      maxorder = 2
      stabcntrl = on
      bwinitstepfrac = 0.01
      estrat = exclude
      rhoinf = 0.5
      predictor = constant
      dDef: Direct
      se1: Segregated | maxsegiter = 10; ntolfact = 0.5; segstabacc = segaacc; segaaccdim = 5; segaaccmix = 0.9
        ss1: SegregatedStep "Merged variables"
          segvar = {comp1_ODE1, comp1_A}
          linsolver = dDef
          subdamp = 0.7
          subjtech = onevery
        ss2: SegregatedStep "Velocity u, Pressure p"
          segvar = {comp1_u, comp1_p}
          linsolver = d1
          subdamp = 0.8
          subjtech = once
        ss3: SegregatedStep "Temperature" | segvar = {comp1_T}; linsolver = d2; subdamp = 0.7; subjtech = onevery
        ll1: LowerLimit | lowerlimit = comp1.T 0
      d1: Direct "Direct, fluid flow variables (spf)" | linsolver = pardiso; pivotperturb = 1.0E-13
      d2: Direct "Direct, heat transfer variables (ht)" | linsolver = pardiso; pivotperturb = 1.0E-13
  sol2 "Solution Store 1" (study std1)

Datasets
  dset1: Solution | solution = sol1
  rev1: Revolve2D "Revolution 2D" | data = dset1; startangle = -90; revangle = 225
  dset2: Solution "Probe Solution 2" | solution = sol1
  cpt1: CutPoint2D "Domain Point Probe 1" | data = dset2; pointx = 0.5*Dd-Hw; pointy = 0.5*U0
  dset3: Solution | solution = sol2
  cpl1: CutPlane
    data = rev1
    planetype = general
    genmethod = pointnormal
    genpoints = 
      {-0.0325686, -0.0823382, 0.0617296}
      {0.767431, -0.682338, 0.0617296}
      {0.276129, 0.329258, 0.919223}
    genpnvec = {1, 0, 0}
  cpl2: CutPlane
    data = rev1
    planetype = general
    genmethod = pointnormal
    genpoints = 
      {-0.0325686, -0.0823382, 0.0617296}
      {0.767431, -0.682338, 0.0617296}
      {0.276129, 0.329258, 0.919223}
    genpnvec = {1, 1, 0}

Derived values
  pev1: EvalPoint "Point Probe Expression 1" | data = cpt1; table = tbl1; expr = T
  av1: AvSurface "Surface Average 1" on selection sel1 | data = dset1; table = tbl2; expr = spf.U; intvolume = on

Tables
  tbl1: Table "Probe Table 1"
    Time (s) | Temperature (degF), Point: (0.5*Dd-Hw, 0.5*U0)
    0 | 80.33
    0.005 | 80.33
    0.01 | 80.33
    0.015 | 80.33
    0.02 | 80.33
    0.025 | 80.33
    0.03 | 80.33
    0.035 | 80.33
    0.04 | 80.33
    0.045 | 80.33
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  tbl2: Table
    // Surface Average 1
    Time (s) | Velocity magnitude (m/s)
    0 | 1.29967e-05
    0.005 | 0.0159975
    0.01 | 0.032555
    0.015 | 0.0490461
    0.02 | 0.0654573
    0.025 | 0.0818069
    0.03 | 0.0981105
    0.035 | 0.114379
    0.04 | 0.130617
    0.045 | 0.146828
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
Plots
  pg1: PlotGroup3D "Temperature and velocity stream lines" | data = rev1
    surf1: Surface | expr = T; unit = degF
    str1: StreamlineSurface
      data = cpl1
      revcoordsys = cylindrical
      expr = {u, v, w}
      descr = Velocity field (spatial frame)
      udist = 0.025
    str2: StreamlineSurface
      data = cpl2
      revcoordsys = cylindrical
      expr = {u, v, w}
      descr = Velocity field (spatial frame)
      udist = 0.025
  pg2: PlotGroup2D "Isothermal Contours (ht)" | data = dset1; dataisaxisym = on
    con1: Contour | expr = T; levelrounding = off
  pg3: PlotGroup2D "Velocity (spf)" | data = dset1; dataisaxisym = on
    surf1: Surface | expr = spf.U
  pg4: PlotGroup2D "Pressure (spf)" | data = dset1; dataisaxisym = on
    con1: Contour | expr = p; levelrounding = off
  pg5: PlotGroup3D "Velocity, 3D (spf)" | data = rev1
    surf1: Surface | expr = spf.U
  pg6: PlotGroup1D "Inner wall Temperature at End of Stroke Position"
    tblp1: Table "Probe Table Graph 1" | table = tbl1; xaxisdata = auto; plotcolumns = 2
  pg7: PlotGroup2D "Magnetic Flux Density" | data = dset1
    surf1: Surface | expr = mf.normB
  pg8: PlotGroup2D "Current Density" | data = dset1
    surf1: Surface | expr = mf.normJ; descr = Current density norm
  pg9: PlotGroup1D "Lorentz force" | data = dset1
    glob1: Global "Lorentz Force" | expr = Fz; unit = N
  pg10: PlotGroup1D "Terminal Velocity" | data = dset1
    glob1: Global "Terminal Velocity" | expr = xt; descr = magnet Velocity
  pg11: PlotGroup1D "Magnet Acceleration" | data = dset1
    glob1: Global "Magnet Acceleration" | expr = a; unit = m/s^2; descr = Magnet Acceleration
  pg12: PlotGroup1D "Temperature along inner wall"
    data = dset1
    title = Temperature along Inner wall
    xlabel = z/U0
    ylabel = Temperature (degF)
    lngr1: LineGraph on boundaries 29, 31, 32 | expr = T; unit = degF; descr = Temperature; xdata = expr; xdataexpr = z/U0
  pg13: PlotGroup1D "Average Velocity" | data = dset1
    tblp1: Table "Table Graph 1" | table = tbl2