// COMSOL Multiphysics 6.0.0.318 model "Viscous Damper.mph"
// Outline of the model tree

Parameters
  R_C = 40  // cylinder outer radius
  t = 7.5  // thickness of cylinder
  R_p_1 = 32.5  // solid piston 1 raduis
  R_p_2 = 32.5  // solid piston floating 2 diameter
  r_p_t = 3  // pistion ring thickness
  r_p_o = 32.5  // piston ring outer radius
  pr_l_1 = 600  // piston rod connected to first piston
  o_r = 2  // orifice radius
  H_C = 1000  // cylinder length
  T_C = 25  // thickness of below casing
  T_A = 25  // thickness of above casing
  pr_r = 15  // piston rod radius
  a_c = 100  // air column height
  o_c = 600  // oil column height
  h_p_1 = 200  // pistion 1 height
  h_p_2 = 100  // piston height 2
  o_casing = 32.5  // outer diameter of casing
  C_t = 25  // thickness of above casing
  p_r_h = 3  // piston ring height
  T0 = 300[K]  // Initial temperature
  hwall = 5[W/(m^2*K)]  // Heat transfer coefficient
  F0 = 127400[N]  // Force due to weight

Functions
  an1: Analytic "Piston velocity" | funcname = v; expr = 500*(0.04*pi)^2*t*exp(-0.04*pi*t); args = t; fununit = mm/s; argunit = s
  an2: Analytic "Piston displacement 1" | funcname = x; expr = 500+500*exp(-0.04*pi*t)*(1+0.04*pi*t); args = t; fununit = mm; argunit = s
  an3: Analytic "Piston displacement 2" | funcname = x2; expr = 500*exp(-0.04*pi*t)*(1+0.04*pi*t)*(25/65)^2+175-500*(25/65)^2; args = t; fununit = mm; argunit = s

Variables
  var1 "Variables 1"
    zlin1 = x(t)*(1+((h_p_1/2)+Z)/(575[mm]-(h_p_1/2)))  // Mesh deformation below piston
    zlin2 = x(t)*(575[mm]-Z)/(575[mm]-(h_p_1/2))  // Mesh deformation above piston

Selections
  sel1: Explicit "symmetry" on boundaries 1, 4, 7, 10, 13, 19, 22, 24, 27, 32, 36, 38, 41, 73, 75, 79-84

Common definitions
  pres1: PrescribedDeformation on domains 4, 10, 17, 19 | prescribedDeformation = {0, 0, x(t)}
  pres2: PrescribedDeformation on domains 5, 9, 11, 12, 18 | prescribedDeformation = {0, 0, zlin2}
  pres3: PrescribedDeformation on domains 3, 7, 16 | prescribedDeformation = {0, 0, zlin1}
  pres4: PrescribedDeformation on domains 2, 6, 15 | prescribedDeformation = {0, 0, x2(t)}
  pres5: PrescribedDeformation on domains 1, 14 | prescribedDeformation = {0, 0, x2(t)}

Geometry
  geom1 "Geometry 1" (3D, length unit mm)
    cyl17: Cylinder "fluid domain" | r = R_C-t; h = H_C
    cyl1: Cylinder "C" | type = surface; layername = Layer 1; layer = t; r = R_C; h = H_C
    cyl2: Cylinder "piston" | pos = {0, 0, H_C-h_p_1-T_A}; r = R_p_1; h = h_p_1
    cyl8: Cylinder "orifice 1" | pos = {0+20, 0, H_C-h_p_1-T_A}; r = o_r; h = h_p_1
    cyl9: Cylinder "orifice 2" | pos = {0-20, 0, H_C-h_p_1-T_A}; r = o_r; h = h_p_1
    cyl10: Cylinder "orifice 3" | pos = {0, 0-20, H_C-h_p_1-T_A}; r = o_r; h = h_p_1
    cyl11: Cylinder "orifice4" | pos = {0, 0+20, H_C-h_p_1-T_A}; r = o_r; h = h_p_1
    dif1: Difference | input = cyl2; input2 = cyl10, cyl11, cyl8, cyl9
    cyl3: Cylinder "piston rod" | pos = {0, 0, H_C-T_A}; r = pr_r; h = pr_l_1
    uni1: Union "Union 1 (piston +piston rod)" | input = cyl3, dif1
    dif2: Difference | input = cyl17; input2 = uni1
    cyl18: Cylinder "piston 1" | pos = {0, 0, H_C-h_p_1-T_A}; r = R_p_1; h = h_p_1
    cyl19: Cylinder "orifice 1.1" | pos = {0+20, 0, H_C-h_p_1-T_A}; r = o_r; h = h_p_1
    cyl20: Cylinder "orifice 2.1" | pos = {0-20, 0, H_C-h_p_1-T_A}; r = o_r; h = h_p_1
    cyl21: Cylinder "orifice 3.1" | pos = {0, 0-20, H_C-h_p_1-T_A}; r = o_r; h = h_p_1
    cyl22: Cylinder "orifice4.1" | pos = {0, 0+20, H_C-h_p_1-T_A}; r = o_r; h = h_p_1
    dif3: Difference | input = cyl18; input2 = cyl19, cyl20, cyl21, cyl22
    cyl23: Cylinder "piston rod 1" | pos = {0, 0, H_C-T_A}; r = pr_r; h = pr_l_1
    uni2: Union | input = cyl23, dif3
    cyl4: Cylinder | pos = {0, 0, H_C-h_p_1-T_A-o_c}; r = R_p_2; h = h_p_2
    dif4: Difference | input = dif2; input2 = cyl4
    cyl24: Cylinder | pos = {0, 0, H_C-h_p_1-T_A-o_c}; r = R_p_2; h = h_p_2
    cyl5: Cylinder (disabled)
      pos = {0, 0, H_C-T_A}
      type = surface
      layername = Layer 1
      layer = C_t
      r = o_casing
      h = T_A
    cyl12: Cylinder (disabled) | r = o_casing; h = T_A
    cyl13: Cylinder (disabled)
      pos = {0, 0, H_C-T_A-p_r_h}
      type = surface
      layername = Layer 1
      layer = r_p_t/2
      r = r_p_o
      h = p_r_h
    cyl14: Cylinder (disabled)
      pos = {0, 0, H_C-T_A-h_p_1+p_r_h}
      type = surface
      layername = Layer 1
      layer = r_p_t/2
      r = r_p_o
      h = p_r_h
    cyl15: Cylinder (disabled)
      pos = {0, 0, H_C-h_p_1-T_A-o_c+p_r_h}
      type = surface
      layername = Layer 1
      layer = r_p_t/2
      r = r_p_o
      h = p_r_h
    cyl16: Cylinder (disabled)
      pos = {0, 0, H_C-h_p_1-T_A-o_c-p_r_h+h_p_2}
      type = surface
      layername = Layer 1
      layer = r_p_t/2
      r = r_p_o
      h = p_r_h
    wp1: WorkPlane | quickplane = zx; unite = on
    pard1: PartitionDomains
      domain = uni2(1) domains 1, 2; dif4(1) domains 1, 2; cyl24(1) domains 1; cyl1(1) domains 1-4
      workplane = wp1
    del1: Delete "Delete Entities 1"
      input = pard1(1) domains 1, 4; pard1(2) domains 2, 4; pard1(3) domains 2; pard1(4) domains 2, 4
    wp2: WorkPlane | quickz = H_C-h_p_1-T_A; unite = on
    wp3: WorkPlane | quickz = H_C-h_p_1-T_A+h_p_1; unite = on
    wp4: WorkPlane | quickz = H_C-h_p_1-T_A-o_c; unite = on
    wp5: WorkPlane | quickz = H_C-h_p_1-T_A-o_c+h_p_2; unite = on
    pard2: PartitionDomains | domain = del1(2) domains 2; del1(4) domains 1, 2; workplane = wp2
    pard3: PartitionDomains | domain = pard2(1) domains 3; pard2(2) domains 2, 4; workplane = wp3
    pard4: PartitionDomains | domain = pard3(2) domains 1, 4; pard3(1) domains 2; workplane = wp4
    pard5: PartitionDomains | domain = pard4(1) domains 2, 6; pard4(2) domains 2; workplane = wp5
    wp6: WorkPlane | quickz = H_C; unite = on
    pard6: PartitionDomains | domain = del1(1) domains 2; workplane = wp6
    del2: Delete "Delete Entities 2" | input = pard5(2) domains 1
    fin: Finalize "Form Union"

Materials
  mat1: Common "Steel AISI 4340 (piston)" on domains 1-6, 8, 11, 12, 14-18
    def "Basic"
      relpermeability = 1
      electricconductivity = 4.032e6[S/m]
      thermalexpansioncoefficient = 12.3e-6[1/K]
      heatcapacity = 475[J/(kg*K)]
      relpermittivity = 1
      density = 7850[kg/m^3]
      thermalconductivity = 44.5[W/(m*K)]
    Enu "Young's modulus and Poisson's ratio"
      E = 205e9[Pa]
      nu = 0.28
  mat2: Common "Silicone Oil" on domains 7, 9, 10, 13, 19
    def "Basic"
      thermalconductivity = 22.5
      density = 950
      heatcapacity = 2e3
      dynamicviscosity = nu_25C*rho*(1-VTC*(T-311[K])/(61[K]))/(1+VTC*0.2107)
      nu_25C = 0.0125[m^2/s]
      VTC = 0.6[1]
  mat3: Common "Air" (disabled) on no domains
    def "Basic"
      thermalexpansioncoefficient = alpha_p(pA,T)
      molarmass = 0.02897[kg/mol]
      bulkviscosity = muB(T)
      relpermeability = 1
      relpermittivity = 1
      dynamicviscosity = eta(T)
      ratioofspecificheat = 1.4
      electricconductivity = 0[S/m]
      heatcapacity = Cp(T)
      density = rho(pA,T)
      thermalconductivity = k(T)
      soundspeed = cs(T)
      eta: Piecewise | arg = T; pieces = {200.0, 1600.0, -8.38278E-7+8.35717342E-8*T^1-7.69429583E-11*T^2+4.6437266E-14*T^3-1.06585607E-17*T^4}; argunit = K; fununit = Pa*s
      Cp: Piecewise | arg = T; pieces = {200.0, 1600.0, 1047.63657-0.372589265*T^1+9.45304214E-4*T^2-6.02409443E-7*T^3+1.2858961E-10*T^4}; argunit = K; fununit = J/(kg*K)
      rho: Analytic | expr = pA*0.02897/R_const[K*mol/J]/T; args = {pA, T}; fununit = kg/m^3; argunit = {Pa, K}
      k: Piecewise | arg = T; pieces = {200.0, 1600.0, -0.00227583562+1.15480022E-4*T^1-7.90252856E-8*T^2+4.11702505E-11*T^3-7.43864331E-15*T^4}; argunit = K; fununit = W/(m*K)
      cs: Analytic | expr = sqrt(1.4*R_const[K*mol/J]/0.02897*T); args = T; fununit = m/s; argunit = K
      an1: Analytic | funcname = alpha_p; expr = -1/rho(pA,T)*d(rho(pA,T),T); args = {pA, T}; fununit = 1/K; argunit = {Pa, K}
      an2: Analytic "Analytic 2a" | funcname = muB; expr = 0.6*eta(T); args = T; fununit = Pa*s; argunit = K
    RefractiveIndex
      n = 1
      ki = 0
    NonlinearModel
      BA = (def.gamma+1)/2
    idealGas
      Rs = R_const/Mn
      heatcapacity = Cp(T)
      ratioofspecificheat = 1.4
      molarmass = 0.02897
      Cp: Piecewise | arg = T; pieces = {200.0, 1600.0, 1047.63657-0.372589265*T^1+9.45304214E-4*T^2-6.02409443E-7*T^3+1.2858961E-10*T^4}; argunit = K; fununit = J/(kg*K)

Physics
  spf: LaminarFlow on domains 7, 9, 10, 13, 19
    dependent variable u = {u, v, w}
    fp1: FluidProperties (default)
    init1: init "Initial Values 1" (default)
    wallbc1: WallBC "Wall 1" (default)
    prpc1: PressurePointConstraint (disabled) on points 20, 41, 46
    sym1: Symmetry on selection sel1
  ht: HeatTransferInSolidsAndFluids on all domains
    dependent variable T
    solid1: SolidHeatTransferModel "Solid 1" (default)
    fluid1: FluidHeatTransferModel "Fluid 1: (Silicon oil)" on domains 7, 9, 10, 13, 19
      gamma_not_IG_mat = userdef
      gamma_not_IG = 1
      fluidType = gasLiquid
    init1: init "Initial Values 1" (default) | Tinit = T0
    ins1: ThermalInsulation (default)
    fluid2: FluidHeatTransferModel "Fluid 2: (Air)" (disabled) on no domains
      gamma_not_IG_mat = userdef
      gamma_not_IG = 1.4
      fluidType = idealGas
    temp1: TemperatureBoundary "Temperature 1" on boundaries 3, 16, 30, 50, 63 | T0 = T0
    hf1: HeatFluxBoundary "Heat Flux 1" on boundaries 2, 5, 8, 11, 14, 49, 52, 55, 58, 61
      HeatFluxType = ConvectiveHeatFlux
      h = hwall
      Text = T0
    sym1: Symmetry on selection sel1
  solid: SolidMechanics on domains 1-6, 8, 11, 12, 14-18
    dependent variable u2 = {u2, v2, w2}
    lemm1: LinearElasticModel "Linear Elastic Material 1" (default)
    free1: Free (default)
    init1: init "Initial Values 1" (default)
    bndl1: BoundaryLoad on boundaries 20 | FperArea = {0, 0, 400e3}
    sym1: SymmetrySolid "Symmetry 1" on selection sel1

Multiphysics
  nitf1: NonIsothermalFlow on all domains | Fluid_physics = spf; Heat_physics = ht

Mesh
  mesh1 "Mesh 1"
    size: MeshSizeDefault | hmax = 4; hauto = 2; custom = on
    map1: Map "Mapped 1" (disabled) on boundaries 1, 4, 7, 10, 13
      dis1: Distribution on edges 2, 5, 8, 11, 14, 16
        type = predefined
        reverse = on
        elemcount = 4
        elemratio = 4
        growthrate = exponential
      dis2: Distribution on edges 13, 29
        type = predefined
        elemcount = 10
        elemratio = 8
        growthrate = exponential
        symmetric = on
      dis3: Distribution on edges 10, 26
        type = predefined
        elemcount = 30
        elemratio = 8
        growthrate = exponential
        symmetric = on
      dis4: Distribution on edges 7, 23
        type = predefined
        elemcount = 60
        elemratio = 8
        growthrate = exponential
        symmetric = on
      dis5: Distribution on edges 4, 20
        type = predefined
        elemcount = 15
        elemratio = 8
        growthrate = exponential
        symmetric = on
      dis6: Distribution on edges 1, 18
        type = predefined
        elemcount = 30
        elemratio = 8
        growthrate = exponential
        symmetric = on
    swe1: Sweep "Swept 1" (disabled) on domains 1-5, 14-18
      sourceface = boundaries 1, 4, 7, 10, 13
      targetface = boundaries 80-84
      dis1: Distribution on domains 1-5, 14-18
        type = predefined
        elemcount = 50
        elemratio = 8
        growthrate = exponential
        symmetric = on
    map2: Map "Mapped 2" (disabled) on boundaries 31, 35, 74, 78
      dis1: Distribution on edges 35, 37, 40, 41, 103, 105, 108, 109 | numelem = 15
      dis2: Distribution on edges 34, 42, 102, 110 | numelem = 50
    swe2: Sweep "Swept 2" (disabled) on domains 10, 19
      sourceface = boundaries 31, 35, 74, 78
      targetface = boundaries 32, 75
    map3: Map "Mapped 3" (disabled) on boundaries 44, 45, 47, 69, 70
      dis1: Distribution on edges 56, 57, 88, 91 | numelem = 20
      dis2: Distribution on edges 53, 86, 89, 97 | numelem = 50
    swe3: Sweep "Swept 3" (disabled) on domains 13 | sourceface = boundaries 47; targetface = boundaries 46
    map4: Map "Mapped 4" (disabled) on boundaries 15, 29, 34, 39, 62, 77
      dis1: Distribution on edges 84, 99, 105, 109, 112 | type = predefined; elemcount = 50; elemratio = 4
    fq1: FreeQuad on boundaries 34, 47, 77
      size1: Size on boundaries 34, 47, 77 | hmin = 0.315; hauto = 1; custom = on; hmax = 1
    fq2: FreeQuad on boundaries 29, 39
      size1: Size on boundaries 29, 39 | hmax = 2; hmin = 0.315; hauto = 1; custom = on
    fq3: FreeQuad on boundaries 15, 62
      size1: Size on boundaries 15, 62 | hmax = 3; hmin = 0.315; hauto = 1; custom = on
    swe4: Sweep "Swept 4" (disabled) on domains 10, 13, 19
      sourceface = boundaries 34, 47, 77
      targetface = boundaries 33, 46, 76
    swe5: Sweep "Swept 5" on domains 1-11, 13-19
      sourceface = boundaries 15, 29, 34, 39, 47, 62, 77
      targetface = boundaries 3, 16, 30, 42, 50, 63
    swe6: Sweep "Swept 6" (disabled) on domains 9 | sourceface = boundaries 29, 34, 47, 77; targetface = boundaries 30
    copy1: Copy (disabled) | source = boundaries 42; destination = boundaries 43
    swe7: Sweep "Swept 7" on domains 12 | sourceface = boundaries 42; targetface = boundaries 43
    map5: Map "Mapped 5" (disabled) on boundaries 34, 47, 77
      dis1: Distribution on edges 56, 57, 88, 91 | type = predefined; elemcount = 20; symmetric = on
      dis2: Distribution on edges 37, 38, 41, 105, 106, 109
        type = predefined
        reverse = on
        elemcount = 30
        elemratio = 4
        growthrate = exponential

Studies
  std1 "Study 1"
    time: Transient "Time Dependent" | tlist = range(0,1,60)

Solver configurations
  sol1 "Solution 1" (study std1)
    v1: Variables "Dependent Variables 1"
      comp1_u2: Field "Displacement field (comp1.u2)" | scalemethod = manual; scaleval = 1e-2*1.57759642247
    t1: Time "Time-Dependent Solver 1"
      tlist = range(0,1,60)
      rtol = 0.001
      atolglobalfactor = 0.05
      atolmethod = {comp1_p, scaled, comp1_T, global, comp1_u, global, comp1_u2, global}
      atolvaluemethod = {comp1_p, factor, comp1_T, factor, comp1_u, factor, comp1_u2, factor}
      atolfactor = {comp1_p, 1, comp1_T, 0.1, comp1_u, 0.1, comp1_u2, 0.1}
      atol = {comp1_p, 1e-3, comp1_T, 1e-3, comp1_u, 1e-3, comp1_u2, 1e-3}
      maxorder = 2
      stabcntrl = on
      bwinitstepfrac = 0.01
      estrat = exclude
      rhoinf = 0.5
      predictor = constant
      se1: Segregated | maxsegiter = 10; ntolfact = 0.5; segstabacc = segaacc; segaaccdim = 5; segaaccmix = 0.9
        ss1: SegregatedStep "Solid Mechanics" | segvar = {comp1_u2}; linsolver = d1
        ss2: SegregatedStep "Velocity u, Pressure p"
          segvar = {comp1_u, comp1_p}
          linsolver = i1
          subdamp = 0.8
          subjtech = once
        ss3: SegregatedStep "Temperature" | segvar = {comp1_T}; linsolver = d2; subdamp = 0.7; subjtech = onevery
        ll1: LowerLimit | lowerlimit = comp1.T 0
      d1: Direct "Suggested Direct Solver (solid)" | linsolver = pardiso; pivotperturb = 1.0E-9; nliniterrefine = on
      i1: Iterative "AMG, fluid flow variables (spf)" | maxlinit = 100; rhob = 20
        mg1: Multigrid | prefun = saamg; maxcoarsedof = 80000; strconn = 0.02; saamgcompwise = on
      d2: Direct "Direct, heat transfer variables (ht)" | linsolver = pardiso; pivotperturb = 1.0E-13

Datasets
  an1_ds1: Grid1D
  dset1: Solution | solution = sol1

Plots
  pg1: PlotGroup1D "1D Plot Group 1" | data = an1_ds1; title = zp(t) (N)
    plot1: Function | expr = comp1.zp(t[1/m][s])